// COMSOL Multiphysics 5.5.0.359 model "COMSOL_flowtransport2D.mph"
// Was not able to figure out how to flow and transport simultaneously. Last three steps of the instructional
// Outline of the model tree

Geometry
  geom1 "Geometry 1" (2D, length unit m)
    r1: Rectangle | size = {120, 10}
    fin: Finalize "Form Union"

Materials
  mat2: Common "Water, liquid" on no domains
    def "Basic"
      thermalexpansioncoefficient = alpha_p(T)
      bulkviscosity = muB(T)
      dynamicviscosity = eta(T)
      ratioofspecificheat = gamma_w(T)
      electricconductivity = 5.5e-6[S/m]
      heatcapacity = Cp(T)
      density = rho(T)
      thermalconductivity = k(T)
      soundspeed = cs(T)
      eta: Piecewise
        arg = T
        pieces = 
          {273.15, 413.15, 1.3799566804-0.021224019151*T^1+1.3604562827E-4*T^2-4.6454090319E-7*T^3+8.9042735735E-10*T^4-9.0790692686E-13*T^5+3.8457331488E-16*T^6}
          {413.15, 553.75, 0.00401235783-2.10746715E-5*T^1+3.85772275E-8*T^2-2.39730284E-11*T^3}
        argunit = K
        fununit = Pa*s
      Cp: Piecewise | arg = T; pieces = {273.15, 553.75, 12010.1471-80.4072879*T^1+0.309866854*T^2-5.38186884E-4*T^3+3.62536437E-7*T^4}; argunit = K; fununit = J/(kg*K)
      rho: Piecewise
        arg = T
        smooth = contd1
        pieces = 
          {273.15, 293.15, 6.3092789034e-05*T^3-0.0603676398829*T^2+18.9229382407066*T-950.704055329848}
          {293.15, 373.15, 1.0335053319e-05*T^3-0.0133950656345*T^2+4.96928883266*T+432.257114008512}
        argunit = K
        fununit = kg/m^3
      k: Piecewise | arg = T; pieces = {273.15, 553.75, -0.869083936+0.00894880345*T^1-1.58366345E-5*T^2+7.97543259E-9*T^3}; argunit = K; fununit = W/(m*K)
      cs: Interpolation | table = {{273, 1403}, {278, 1427}, {283, 1447}, {293, 1481}, {303, 1507}, {313, 1526}, {323, 1541}, {333, 1552}, {343, 1555}, {353, 1555}, {363, 1550}, {373, 1543}}; interp = piecewisecubic; argunit = K; fununit = m/s
      an1: Analytic | funcname = alpha_p; expr = -1/rho(T)*d(rho(T),T); args = T; argunit = K; fununit = 1/K
      an2: Analytic | funcname = gamma_w; expr = 1+(T/Cp(T))*(alpha_p(T)*cs(T))^2; args = T; argunit = K; fununit = 1
      an3: Analytic | funcname = muB; expr = 2.79*eta(T); args = T; argunit = K; fununit = Pa*s
  mat1: Common "Granite" on all domains
    def "Basic"
      thermalexpansioncoefficient = 7e-6[1/K]
      heatcapacity = 850[J/(kg*K)]
      density = 2600[kg/m^3]
      thermalconductivity = 2.9[W/(m*K)]
      porosity = 0.3
      hydraulicpermeability = 10^-6
      dynamicviscosity = 8.9e-4
    Enu "Young's modulus and Poisson's ratio"
      youngsmodulus = 60e9[Pa]
      poissonsratio = 0.25

Physics
  dl: DarcysLaw on all domains
    dependent variable p
    dlm1: DarcysLawModel "Fluid and Matrix Properties 1" (default) | FluidMaterial = mat2; PorousMaterial = mat1
    nf1: NoFlow (default)
    init1: init "Initial Values 1" (default)
    hh1: HydraulicHead on boundaries 1 | H0 = 0.1
    hh2: HydraulicHead on boundaries 4
  tds: DilutedSpeciesPorousMedia "Transport of Diluted Species in Porous Media" on all domains
    dependent variable c
    TransportMechanism.DispersionInPorousMedia = 1
    pmtp1: PorousMediaTransportProperties (default)
      u_src = root.comp1.dl.u
      FluidMaterialList = mat2
      DD = diag{10, 1, 0}
    nflx1: NoFlux (default)
    init1: init "Initial Values 1" (default)
    conc1: Concentration on boundaries 1 | species = 1; c0 = 10
    open1: OpenBoundary on no boundaries

Mesh
  mesh1 "Mesh 1"
    size: MeshSizeDefault | hmax = 8.04; hmin = 0.036; hcurve = 0.3; hgrad = 1.3
    auto_f1: FreeTri "Free Triangular 1" on remaining entities

Studies
  std1 "Study 1"
    stat: Stationary | solve for = {dl}
    time: Transient "Time Dependent" | tlist = range(0,0.1,1)

Solver configurations
  sol1 "Solution 1" (study std1)
    v1: Variables "Dependent Variables 1"
    s1: Stationary "Stationary Solver 1"
      dDef: Direct
      fc1: FullyCoupled
    su1: StoreSolution "Solution Store 1"
    v2: Variables "Dependent Variables 2" | initmethod = sol; resscalemethod = manual; notsolmethod = sol
    t1: Time "Time-Dependent Solver 1" | rtol = 0.005; maxorder = 2
      fc1: FullyCoupled | maxiter = 8; damp = 0.9; jtech = once; stabacc = aacc; aaccdim = 5
      d1: Direct
  sol2 "Solution Store 1" (study std1)

Datasets
  dset1: Solution | solution = sol1
  dset2: Solution | solution = sol2

Plots
  pg1: PlotGroup2D "Output" | data = dset1
    surf1: Surface | expr = c
    str1: Streamline on boundaries 1-4
      expr = {dl.u, dl.v}
      pointtype = arrow
      arrowcount = 18
      arrowlength = logarithmic
      arrowscale = 618.6608012593045